// SBML level 3 version 1
import "growth_fba.xml";
import "growth_update.xml";

model growth_top(C1)

  // Sub-modules:
  C1: growth_fba();
  C2: growth_update();

  // Compartments:
  compartment Cell = 1; C1.compartment__Cell is Cell; C2.compartment__Cell is Cell;

  // Species:
  substanceOnly species O2 in Cell = 0.21; C2.input__O2 is O2;
  substanceOnly species Ac in Cell = 0.4; C2.input__Ac is Ac;
  substanceOnly species X in Cell = 0.001; C2.input__X is X; C2.input__X_out is X;
  substanceOnly species Glcxt in Cell = 10.8; C2.input__Glcxt is Glcxt;
  substanceOnly species dummy in Cell = 0;

  // Parameters:
  rateOfV1 = 0; C2.input__rateOfV1 is rateOfV1;
  rateOfV2 = 0; C2.input__rateOfV2 is rateOfV2;
  rateOfV3 = 0; C2.input__rateOfV3 is rateOfV3;
  rateOfV4 = 0; C2.input__rateOfV4 is rateOfV4;
  max_v1 = 8.655; C1.input__max_v1 is max_v1;
  max_v2 = 3.195; C1.input__max_v2 is max_v2;
  Km = 0.015;
  max_glcxt_uptake = 10;
  max_o2_uptake = 15;
  max_v3 = 3.15; C1.input__max_v3 is max_v3;
  max_v4 = 0; C1.input__max_v4 is max_v4;
  dt = 0.04;
  p0 = 1;
  p1 = 0;
  rateOfGrowth = 0; C2.input__mu is rateOfGrowth;
  p2 = 1;
  p3 = 0;
  p4 = 1;
  p5 = 0;
  p6 = 1;
  p7 = 0;
  p8 = 1;
  p9 = 0;
  previousTime = 0;

  // Reactions:
  v4: dummy => ; v4_kf; C1.reaction__v4 is v4;
    v4_kf = 0.1; v4_kr = 1;
  v2: dummy => ; v2_kf; C1.reaction__v2 is v2;
    v2_kf = 0.1; v2_kr = 1;
  v3: dummy => ; v3_kf; C1.reaction__v3 is v3;
    v3_kf = 0.1; v3_kr = 1;
  mu: dummy => ; 0;
  v1: dummy => ; v1_kf; C1.reaction__v1 is v1;
    v1_kf = 0.1; v1_kr = 1;
  R8: => O2; piecewise(kLa*(0.21 - O2), kLa*(0.21 - O2) > 0, 0);
    kLa = 7.5;

  // Events:
  t0: at ((time - previousTime >= dt) && (p0 == 1)), priority = 2, t0=false, persistent=false, fromTrigger=false: max_v1 = piecewise(rateOfV1 + 0.1*dt, (Ac > 0) && (O2 > 0), 0), max_v2 = piecewise(rateOfV2 + 0.3*dt, (Glcxt > 0) && (O2 > 0), 0), max_v3 = piecewise(rateOfV3 + 0.3*dt, (Glcxt > 0) && (O2 > 0), 0), max_v4 = rateOfV4 + 0.1*dt, previousTime = time, p0 = 0, p1 = 1;
  t1: at (true && (p1 == 1)), t0=false, persistent=false, fromTrigger=false: p1 = 0, p0 = 1;
  t2: at ((O2 <= 0) && (p2 == 1)), t0=false, persistent=false, fromTrigger=false: O2 = 0, rateOfV1 = 0, rateOfV2 = 0, rateOfV3 = 0, p2 = 0, p3 = 1;
  t3: at (true && (p3 == 1)), t0=false, persistent=false, fromTrigger=false: p3 = 0, p2 = 1;
  t4: at ((Ac <= 0) && (p4 == 1)), t0=false, persistent=false, fromTrigger=false: Ac = 0, rateOfV1 = 0, p4 = 0, p5 = 1;
  t5: at (true && (p5 == 1)), t0=false, persistent=false, fromTrigger=false: p5 = 0, p4 = 1;
  t6: at ((Glcxt <= 0) && (p6 == 1)), t0=false, persistent=false, fromTrigger=false: Glcxt = 0, rateOfV2 = 0, rateOfV3 = 0, rateOfV4 = 0, p6 = 0, p7 = 1;
  t7: at (true && (p7 == 1)), t0=false, persistent=false, fromTrigger=false: p7 = 0, p6 = 1;
  t8: at (true && (p8 == 1)), priority = 1, t0=false, persistent=false, fromTrigger=false: rateOfV1 = piecewise(v1, 35*v1 + 12.92*v2 + 12.73*v3 < 15, 0), rateOfV2 = v2, rateOfV3 = v3, rateOfV4 = piecewise(v4, 9.46*v2 + 9.84*v3 + 19.23*v4 < 10, 0), p8 = 0, p9 = 1;
  t9: at (dt) after (true && (p9 == 1)), t0=false, persistent=false, fromTrigger=false: p9 = 0, p8 = 1;
end
