// SBML level 3 version 1

model growth_update(Cell, Ac, rateOfV1, rateOfV3, rateOfV4, rateOfV2, X, O2_out, o_rate_uptake, g_rate_uptake, Glcxt, Glcxt_out, O2)

  // Compartments:
  compartment Cell = 1;

  // Species:
  substanceOnly species Glcxt in Cell = 0;
  substanceOnly species O2 in Cell = 0;
  substanceOnly species Ac in Cell = 0;
  substanceOnly species X in Cell = 0;
  substanceOnly species Glcxt_out in Cell = 0;
  substanceOnly species O2_out in Cell = 0;

  // Parameters:
  rateOfV1 = 0;
  rateOfV3 = 0;
  rateOfV2 = 0;
  rateOfV4 = 0;
  g_rate_uptake = 0;
  o_rate_uptake = 0;

  // Reactions:
  v1: 39.43 Ac + 35 O2 => X; rateOfV1*X;
  o_uptake: O2_out => O2; g_rate_uptake;
  g_uptake: Glcxt_out => Glcxt; g_rate_uptake;
  v3: 12.73 O2 + 9.84 Glcxt => 1.24 Ac + X; rateOfV3*X;
  v4: 19.23 Glcxt => 12.12 Ac + X; rateOfV4*X;
  v2: 9.46 Glcxt + 12.92 O2 => X; rateOfV2*X;
end
