// SBML level 3 version 1
import "growth_fba.xml";
import "growth_update.xml";
import "growth_bounds.xml";

model growth_top(Cell, C1, C2)

  // Sub-modules:
  C1: growth_fba();
  C2: growth_update();
  C3: growth_bounds();

  // Compartments:
  compartment Cell = 1; C3.compartment__Cell is Cell;

  // Species:
  substanceOnly species O2 in Cell = 0.21; C3.input__O2 is O2; C2.input__O2 is O2;
  substanceOnly species Ac in Cell = 0.4; C3.input__Ac is Ac; C2.input__Ac is Ac;
  substanceOnly species Glcxt in Cell = 10.8; C3.input__Glcxt is Glcxt; C2.input__Glcxt is Glcxt;
  substanceOnly species dummy in Cell = 0;
  substanceOnly species X in Cell = 0.001; C3.input__X is X; C2.input__X is X;

  // Parameters:
  Km = 0.015;
  dt = 0.01; C3.input__dt is dt;
  g_uptake_max = 0; C1.input__g_uptake_max is g_uptake_max; C3.output__max_glcxt is g_uptake_max;
  o_uptake_max = 0; C1.input__o_uptake_max is o_uptake_max; C3.output__max_o2 is o_uptake_max;
  a_uptake_max = 0; C1.input__a_uptake_max is a_uptake_max; C3.output__max_ac is a_uptake_max;
  g_uptake_min = 0; C1.input__g_uptake_min is g_uptake_min; C3.output__min_glxct is g_uptake_min;
  o_uptake_min = 0; C1.input__o_uptake_min is o_uptake_min; C3.output__min_o2 is o_uptake_min;
  a_uptake_min = 0; C1.input__a_uptake_min is a_uptake_min; C3.output__min_ac is a_uptake_min;
  X_min = 0; C1.input__X_min is X_min; C3.output__X_min is X_min;
  X_max = 0; C1.input__X_max is X_max; C3.output__X_max is X_max;

  // Assignment rules:
  a_rate_uptake := a_uptake;
  x_rate_growth := growth;
  g_rate_uptake := g_uptake;
  o_rate_uptake := o_uptake;

  // Reactions:
  growth: dummy => ; growth_kf; C1.reaction__growth is growth;
    growth_kf = 0.1; growth_kr = 1;
  g_uptake: dummy => ; g_uptake_kf; C1.reaction__g_uptake is g_uptake;
    g_uptake_kf = 0.1; g_uptake_kr = 1;
  o_uptake: dummy => ; o_uptake_kf; C1.reaction__o_uptake is o_uptake;
    o_uptake_kf = 0.1; o_uptake_kr = 1;
  a_uptake: dummy => ; a_uptake_kf; C1.reaction__a_uptake is a_uptake;
    a_uptake_kf = 0.1; a_uptake_kr = 1;
  o2_transport: => O2; kLa*(0.21 - O2);
    kLa = 7.5;
end
