// SBML level 3 version 1

model update(rateOfR1, ATPOut, ATPIn, rateOfR0, rateOfR3, rateOfR4, rateOfR5, rateOfR6, rateOfR2, rateOfR7, Cell, ADPIn)

  // Compartments:
  compartment Cell = 1;

  // Species:
  substanceOnly species $GlucoseIn in Cell = 1;
  substanceOnly species ATPIn in Cell = 0;
  substanceOnly species ATP in Cell = 0;
  substanceOnly species ADPIn in Cell = 0;
  substanceOnly species ADP in Cell = 0;
  substanceOnly species Glucose in Cell = 0;
  substanceOnly species Fructose in Cell = 0;
  substanceOnly species GADP in Cell = 0;
  substanceOnly species Phosphoglycerate in Cell = 0;
  substanceOnly species $Pyruvate in Cell = 0;
  substanceOnly species ATPOut in Cell = 0;

  // Parameters:
  rateOfR1 = 0;
  rateOfR2 = 0;
  rateOfR0 = 0;
  rateOfR4 = 0;
  rateOfR3 = 0;
  rateOfR5 = 0;
  rateOfR7 = 0;
  rateOfR6 = 0;

  // Reactions:
  R2: ADPIn => ADP; rateOfR2;
    R2_kf = 0.1;
  R4: Fructose + ATP => 2 GADP + ADP; rateOfR4;
  R0: $GlucoseIn => Glucose; rateOfR0;
  R1: ATPIn => ATP; rateOfR1;
    R1_kf = 0.1;
  R5: GADP + ADP => Phosphoglycerate + ATP; rateOfR5;
    R5_kf = 0.1;
  R6: Phosphoglycerate + ADP => $Pyruvate + ATP; rateOfR6;
    R6_kf = 0.1;
  R7: ATP => ATPOut; rateOfR7;
  R3: Glucose + ATP => ADP + Fructose; rateOfR3;
end
