// SBML level 3 version 1

model growth_update(Cell, Ac, rateOfV1, rateOfV3, rateOfV4, rateOfV2, X, o_rate_uptake, g_rate_uptake, Glcxt_out, O2_out, Glcxt, O2)

  // Compartments:
  compartment Cell = 1;

  // Species:
  substanceOnly species Glcxt in Cell = 0;
  substanceOnly species O2 in Cell = 0;
  substanceOnly species Ac in Cell = 0;
  substanceOnly species X in Cell = 0;
  substanceOnly species Glcxt_out in Cell = 0;
  substanceOnly species O2_out in Cell = 0;

  // Parameters:
  rateOfV1 = 0;
  rateOfV3 = 0;
  rateOfV2 = 0;
  rateOfV4 = 0;
  g_rate_uptake = 0;
  o_rate_uptake = 0;
  Km = 0.001;

  // Reactions:
  r1: O2_out => O2; o_rate_uptake;
  v4: 19.23 Glcxt => 12.12 Ac + X; rateOfV4*X*Glcxt/(Glcxt + Km);
  v2: 9.46 Glcxt + 12.92 O2 => X; X*rateOfV2*Glcxt/(Glcxt + Km)*O2/(O2 + Km);
  v1: 39.43 Ac + 35 O2 => X; X*rateOfV1*Ac/(Ac + Km)*O2/(O2 + Km);
  v3: 12.73 O2 + 9.84 Glcxt => 1.24 Ac + X; X*rateOfV3*O2/(O2 + Km)*Glcxt/(Glcxt + Km);
  g_uptake: Glcxt_out => Glcxt; g_rate_uptake;
end
