// SBML level 3 version 1
import "growth_fba.xml";
import "growth_update.xml";
import "growth_bounds.xml";

model growth_top(C1, C1, C1, C1, C2)

  // Sub-modules:
  C1: growth_fba();
  C2: growth_update();
  C3: growth_bounds();

  // Compartments:
  compartment Cell = 1; C3.compartment__Cell is Cell;

  // Species:
  substanceOnly species O2 in Cell = 0.21; C2.input__O2_out is O2; C2.input__O2 is O2; C3.input__O2 is O2;
  substanceOnly species Ac in Cell = 0.4; C2.input__Ac is Ac; C3.input__Ac is Ac;
  substanceOnly species Glcxt in Cell = 10.8; C2.input__Glcxt_out is Glcxt; C2.input__Glcxt is Glcxt; C3.input__Glcxt is Glcxt;
  substanceOnly species dummy in Cell = 0;
  substanceOnly species X in Cell = 0.001; C2.input__X is X;

  // Parameters:
  max_v1 = 10; C1.input__max_v1 is max_v1; C3.input__max_v1 is max_v1;
  max_v2 = 10; C1.input__max_v2 is max_v2; C3.input__max_v2 is max_v2;
  Km = 0.015;
  max_v3 = 10; C1.input__max_v3 is max_v3; C3.input__max_v3 is max_v3;
  max_v4 = 10; C1.input__max_v4 is max_v4; C3.input__max_v4 is max_v4;
  dt = 0.04;
  c = 1;

  // Assignment rules:
  g_uptake_max := 10*Glcxt/(Km + Glcxt);
  rateOfV1 := v1;
  rateOfV2 := v2;
  rateOfV3 := v3;
  rateOfV4 := v4;
  g_rate_uptake := g_uptake;
  o_rate_uptake := o_uptake;

  // Reactions:
  v4: dummy => ; v4_kf; C1.reaction__v4 is v4;
    v4_kf = 0.1; v4_kr = 1;
  v2: dummy => ; v2_kf; C1.reaction__v2 is v2;
    v2_kf = 0.1; v2_kr = 1;
  v3: dummy => ; v3_kf; C1.reaction__v3 is v3;
    v3_kf = 0.1; v3_kr = 1;
  g_uptake: dummy => ; g_uptake_kf;
    g_uptake_kf = 0.1; g_uptake_kr = 1;
  o_uptake: dummy => ; o_uptake_kf;
    o_uptake_kf = 0.1; o_uptake_kr = 1;
  v1: dummy => ; v1_kf; C1.reaction__v1 is v1;
    v1_kf = 0.1; v1_kr = 1;
  o2_transport: => O2; kLa*(0.21 - O2);
    kLa = 7.5;
end
