// SBML level 3 version 1
import "fba.xml";
import "update.xml";

model Top(C1)

  // Sub-modules:
  C1: fba();
  C2: update();

  // Compartments:
  compartment Cell = 1; C2.compartment__Cell is Cell;

  // Species:
  substanceOnly species ATP in Cell = 2; C2.input__ATP is ATP;
  substanceOnly species dummy in Cell = 0;
  substanceOnly species ADP in Cell = 1; C2.input__ADP is ADP;
  substanceOnly species Pyruvate in Cell = 0; C2.input__Pyruvate is Pyruvate;
  substanceOnly species Glucose in Cell = 1; C2.input__Glucose is Glucose;

  // Parameters:
  dt = 1;

  // Assignment rules:
  rateOfADP := ADP_Ex;
  max_glcxt := piecewise(Glucose/dt, Glucose/dt < 1, 1);
  rateOfATP := ATP_Ex;
  rateOfPy := Py_Ex;
  rateOfGlcxt := Glcxt_Ex;
  max_adp := ADP/dt;

  // Reactions:
  ADP_Ex: dummy => ; 0; C1.reaction__ADP_Ex is ADP_Ex;
  ATP_Ex: dummy => ; 0; C1.reaction__ATP_Ex is ATP_Ex;
  Py_Ex: dummy => ; 0; C1.reaction__Pyruvate_Ex is Py_Ex;
  Glcxt_Ex: dummy => ; 0; C1.reaction__Glucose_Ex is Glcxt_Ex;
end
