// SBML level 3 version 1
import "fba.xml";
import "update.xml";
import "ode.xml";

model Top(C1, C1, C2)

  // Sub-modules:
  C1: fba();
  C2: update();
  C3: ode();

  // Compartments:
  compartment Cell = 1; C3.compartment__Cell is Cell;

  // Species:
  substanceOnly species ATP in Cell = 2; C3.input__ATP is ATP; C2.input__ATPIn is ATP; C2.output__ATPOut is ATP;
  substanceOnly species dummy in Cell = 0;
  substanceOnly species $ADP in Cell = 1; C3.input__ADP is ADP; C2.input__ADPIn is ADP;

  // Assignment rules:
  rateOfR0 := R0;
  bound := 10*ATP/(1 + ATP);
  rateOfR1 := R1;
  rateOfR2 := R2;
  rateOfR3 := R3;
  rateOfR4 := R5;
  rateOfR5 := R6;
  rateOfR6 := R6;
  rateOfR7 := R7;

  // Reactions:
  R0: dummy => ; R0_kf; C1.reaction__R0 is R0;
    R0_kf = 0.1; R0_kr = 1;
  R1: dummy => ; R1_kf; C1.reaction__R1 is R1;
    R1_kf = 0.1; R1_kr = 1;
  R2: dummy => ; R2_kf; C1.reaction__R2 is R2;
    R2_kf = 0.1; R2_kr = 1;
  R3: dummy => ; R3_kf; C1.reaction__R3 is R3;
    R3_kf = 0.1; R3_kr = 1;
  R4: dummy => ; R4_kf; C1.reaction__R4 is R4;
    R4_kf = 0.1; R4_kr = 1;
  R5: dummy => ; R5_kf; C1.reaction__R5 is R5;
    R5_kf = 0.1; R5_kr = 1;
  R6: dummy => ; R6_kf; C1.reaction__R6 is R6;
    R6_kf = 0.1; R6_kr = 1;
  R7: dummy => ; R7_kf; C1.reaction__R7 is R7;
    R7_kf = 0.1; R7_kr = 1;
end
